OpenVSP model (file version 5), 3 components.
Geometry view with OpenVSP parameter names; values to 6 digits, angles in degrees, lengths in the model's unit.
Overall bounding box: X_Min=-3.01129 X_Len=6.10036 Y_Min=-7.2737 Y_Len=14.5474 Z_Min=-0.978132 Z_Len=1.3092

Blank "Aircraft"
  location (X Y Z) -6.42857 0 -0.75, rotation 0 0 0

Wing "Main Wing", child of "Aircraft"
  location (X Y Z) -2.02857 0 -0.75, rotation 0 0 0; relative location 4.4 0 0, rotation 0 0 0
  symmetric about XZ
  bounding box size 5.11764 14.5474 0.456265
  totals: TotalSpan=14.5484 TotalProjectedSpan=14.5474 TotalChord=2.15529 TotalArea=31.7588 TotalAR=6.66355
  root: chord 4.56, twist 0, NACA 4-series Camber=0 CamberLoc=0.2 ThickChord=0.1
  sections:
    n  Span      Root_Chord  Tip_Chord  Area      Sweep    Sweep_Location  Dihedral  Twist  Twist_Location  tip airfoil
    1  0.486     4.56        4.56       2.21616   0        0               0         0      0.25            as above
    2  2.6268    4.56        1.76       8.30069   3.38636  1               0         0      0.25            as above
    3  3.25307   1.76        1.08       4.61936   2.59091  1               1         0      0.25            as above
    4  0.454162  1.08        0.923333   0.454919  15.6818  1               0         0      0.25            as above
    5  0.454162  0.923333    0.34625    0.288298  15.6818  1               0         0      0.25            as above

Wing "Canard", child of "Aircraft"
  location (X Y Z) -2.609 0 0.28, rotation 0 0 0; relative location 3.81957 0 1.03, rotation 0 0 0
  symmetric about XZ
  bounding box size 1.42312 7.82439 0.102143
  totals: TotalSpan=7.82439 TotalProjectedSpan=7.82439 TotalChord=0.541291 TotalArea=5.81518 TotalAR=10.5278
  root: chord 1.02083, twist 0, NACA 4-series Camber=0 CamberLoc=0.2 ThickChord=0.1
  sections:
    n  Span      Root_Chord  Tip_Chord  Area      Sweep     Sweep_Location  Dihedral  Twist  Twist_Location  tip airfoil
    1  3.36458   1.02083     0.572917   2.68115   -6.81818  0               0         0      0.25            as above
    2  0.273804  0.572917    0.440538   0.138744  13.2273   0               0         0      0.25            as above
    3  0.273804  0.440538    0.2        0.087691  48        0               0         0      0.25            as above
