OpenVSP model (file version 5), 9 components.
Geometry view with OpenVSP parameter names; values to 6 digits, angles in degrees, lengths in the model's unit.
Overall bounding box: X_Min=-5 X_Len=35 Y_Min=-19.9878 Y_Len=39.9756 Z_Min=-3.13043 Z_Len=8.79535

Blank "Aircraft"
  location (X Y Z) 0 0 0, rotation 0 0 0

Wing "Main Wing", child of "Aircraft"
  location (X Y Z) 16 0 0, rotation 0 0 0
  symmetric about XZ
  bounding box size 10.5265 39.9756 1.35829
  totals: TotalSpan=40 TotalProjectedSpan=39.9756 TotalChord=5.5 TotalArea=220 TotalAR=7.26387 RelativeTwistFlag=1
  root: chord 7, twist 0, NACA 4-series Camber=0 CamberLoc=0.33 ThickChord=0.12
  sections:
    n  Span  Root_Chord  Tip_Chord  Area  Sweep  Sweep_Location  Dihedral  Twist  Twist_Location  tip airfoil
    1  20    7           4          110   -10    0               2         0      0.25            as above
  SS_Control "Ailerons": UStart=0.268293 UEnd=0.493902 Length_C_Start=0.25 Length_C_End=0.25 Length_Start=1.34756 Length_End=1.00915 LE_Flag=0 Surf_Type=2

Fuselage "Tail Booms", child of "Main Wing"
  location (X Y Z) 13 7 0.25, rotation 0 0 0; relative location -3 7 0.25, rotation 0 0 0
  symmetric about XZ
  bounding box size 17 15 1
  Design: Length=17
  cross sections:
    n  XLocPercent  YLocPercent  ZLocPercent  shape
    0  0            0            0            point
    1  0.0833333    0            0            super ellipse Super_Height=1 Super_M=5 Super_MaxWidthLoc=0 Super_N=2 Super_Width=1
    2  0.927339     0            0            as above
    3  1            0            0            point

Wing "Vertical Tail", child of "Main Wing"
  location (X Y Z) 24 7 -0.25, rotation 90 0 0
  symmetric about XZ
  bounding box size 5.17902 14.1767 5.91491
  totals: TotalSpan=14 TotalProjectedSpan=11.8298 TotalChord=4.5 TotalArea=58 TotalAR=2.41284 RelativeTwistFlag=1
  root: chord 5, twist -3, biconvex ThickChord=0.046875
  sections:
    n  Span  Root_Chord  Tip_Chord  Area  Sweep  Sweep_Location  Dihedral  Twist  Twist_Location  tip airfoil
    1  1     5           5          5     0      0               0         0      0.25            biconvex ThickChord=0.04688
    2  6     5           3          24    20     0               35        0      0.25            biconvex ThickChord=0.09375

Wing "Canard", child of "Aircraft"
  location (X Y Z) 1 0 2, rotation 0 0 0
  symmetric about XZ
  bounding box size 4.40628 16 0.444356
  totals: TotalSpan=16 TotalProjectedSpan=16 TotalChord=3.5 TotalArea=56 TotalAR=4.57143 RelativeTwistFlag=1
  root: chord 4, twist 3, NACA 4-series Camber=0.02 CamberLoc=0.33 ThickChord=0.1
  sections:
    n  Span  Root_Chord  Tip_Chord  Area  Sweep  Sweep_Location  Dihedral  Twist  Twist_Location  tip airfoil
    1  8     4           3          28    10     0               0         0      0.25            NACA 4-series Camber=0 CamberLoc=0.33 ThickChord=0.1
  SS_Control "Elevator": UStart=0.15 UEnd=0.487805 Length_C_Start=0.33 Length_C_End=0.33 Length_Start=1.221 Length_End=0.998049 LE_Flag=0 Surf_Type=2

Fuselage "Fuselage", child of "Aircraft"
  location (X Y Z) -5 0 0.869565, rotation 0 0 0
  bounding box size 29 3.00004 3.36667
  Design: Length=29
  cross sections:
    n  XLocPercent  YLocPercent  ZLocPercent  shape
    0  0            0            0            point
    1  0.206897     0            0.00833333   super ellipse Super_Height=3.25 Super_M=2 Super_MaxWidthLoc=-0.25 Super_N=2 Super_Width=3
    2  1            0            0            ellipse Ellipse_Height=3 Ellipse_Width=3
    3  1            0            0            point

Fuselage "Canopy", child of "Fuselage"
  location (X Y Z) 10 0 2.25, rotation 0 0 0; relative location 15 0 1.38043, rotation 0 0 0
  bounding box size 10 2 2.5
  Design: Length=10
  cross sections:
    n  XLocPercent  YLocPercent  ZLocPercent  shape
    0  0            0            0            point
    1  0.5          0            0            ellipse Ellipse_Height=2.5 Ellipse_Width=2
    2  1            0            -0.00714286  point

Custom "Disk", child of "Fuselage"
  location (X Y Z) 25.1786 0 0.869565, rotation 0 0 0; relative location 30.1786 0 0, rotation 0 0 0
  bounding box size 0 8 8
  Design: Diameter=8
  custom script Disk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

Blank "BlankGeom"
  location (X Y Z) 11.98 0 3.33333, rotation 0 0 0

VSPAERO settings: Sref=220 bref=40 cref=5.5 Xcg=11.98 Ycg=-1.95588e-05 Zcg=0.886534 AlphaStart=0 AlphaEnd=15 AlphaNpts=1 BetaStart=0 BetaEnd=0 BetaNpts=1 MachStart=0 MachEnd=1.1 MachNpts=12 ReCref=5e+06 Vinf=50.5546 Rho=0.002377
  control group "Main Wing_Ailerons": DeflectionAngle=0
  control group "Canard_Elevator": DeflectionAngle=20
